A := [2.2, 1, 1.2; 1, 2.7, 1.2; 1.2, 1.2, 3.2]
# Вектор, содержащий собственные значения
eigenvals(A) = [5.03603; 1.33906; 1.72491]
# как видно, самое большое собственное
# значение равно 5.036, его и берем
dx1 := 5.036 - 5.03573 = 0.00027  # абсолютная
DX1 := dx1*100/5.036 = 0.0053614  # относительная
