x := 2.325
Δx := 0.1*10^-1  # в широком смысле  # количество цифр 3
Δx ≤ 1
2  # верно
Δx ≤ 0.1
3  # верно
Δx ≤ 0.01
2  # верно
Δx ≤ 0.001
5  # неверно
# в строгом смысле
Δx ≤ 1/2
2  # верно  # количество цифр 2
# 3 | верно
Δx ≤ 0.01/2
2  # неверно
Δx ≤ 0.001/2
a := 0.000135
δa := 0.15
Δa := |a|*δa = 2.025e-5
# в широком смысле | в строгом смысле
0  # верно
Δa ≤ 1
0  # верно
Δa ≤ 1/2
Δa ≤ 0.1
0  # верно
Δa ≤ 0.1/2
0  # верно
Δa ≤ 0.01
0  # верно
Δa ≤ 0.001
0  # верно
0  # верно
Δa ≤ 0.01/2
Δa ≤ 0.0001
1  # верно
Δa ≤ 0.00001
3  # неверно
0  # верно
Δa ≤ 0.001/2
1  # верно
# количество цифр 5
Δa ≤ 0.0001/2
# 3 | неверно
Δa ≤ 0.00001/2
# количество цифр 5
