a1 := 1.22
a2 := 2.33
T1 := 4.61
T2 := 6.72
# ЗАФИКСИРУЕМ a1 | ЗАФИКСИРУЕМ a2
z3 := 4*π^2*(a1^2 - (a2^2 - 0.002))/(T1^2*a1 - T2^2*(a2 - 0.002))
z1 := 4*π^2*((a1 - 0.002)^2 - a2^2)/(T1^2*(a1 - 0.002) - T2^2*a2)
z3 = 1.96317
z1 = 1.96331
z2 := 4*π^2*((a1 + 0.002)^2 - a2^2)/(T1^2*(a1 + 0.002) - T2^2*a2)
z4 := 4*π^2*(a1^2 - (a2^2 + 0.002))/(T1^2*a1 - T2^2*(a2 + 0.002))
z4 = 1.9607
z2 = 1.96055
# С ростом a1 функция убывает | C ростом a2 функция убвает
# ЗАФИКСИРУЕМ T1 | ЗАФИКСИРУЕМ T2
z5 := 4*π^2*(a1^2 - a2^2)/((T1 - 0.01)^2*a1 - T2^2*a2)
z7 := 4*π^2*(a1^2 - a2^2)/(T1^2*a1 - (T2 - 0.02)^2*a2)
z5 = 1.95916
z6 := 4*π^2*(a1^2 - a2^2)/((T1 + 0.01)^2*a1 - T2^2*a2)
z7 = 1.97753
z8 := 4*π^2*(a1^2 - a2^2)/(T1^2*a1 - (T2 + 0.02)^2*a2)
z6 = 1.96472
# с ростом T1 функция возрастает
z8 = 1.94654
# с ростом T2 функция убывает
Na2 := 2.328
Va1 := 1.222
Na1 := 1.218
Va2 := 2.332
Nt2 := 6.70
Vt1 := 4.62
Nt1 := 4.60
Vt2 := 6.74
VG := 4*π^2*(Na1^2 - Va2^2)/(Vt1^2*Na1 - Nt2^2*Va2)
NG := 4*π^2*(Va1^2 - Na2^2)/(Nt1^2*Va1 - Vt2^2*Na2)
VG = 1.98416
NG = 1.94003
# Различие в третьей цифре уже существенные
# Округляем нижнюю границу с недостатком, а верхнюю границу с избытком
Тогда
ΔZ ≤ (VG - NG)/2
VG := 1.99
NG := 1.94
GG := (VG + NG)/2
GG = 1.965
x := (VG - NG)/2 = 0.025
