A1 := [15.7]
|A1| = 15.7
A2 := [15.7, 6.6; 8.8, -6.7]
|A2| = -163.27
A3 := [15.7, 6.6, -5.7; 8.8, -6.7, 5.5; 6.3, -5.7, -23.4]
|A3| = 4586.72
A4 := [15.7, 6.6, -5.7, 11.5; 8.8, -6.7, 5.5, -4.5; 6.3, -5.7, -23.4, 6.6; 14.3, 8.7, -15.7, -5.8]
|A4| = -102155
