B := [-2.4; 5.6; 7.7; 23.4]
A := [15.7, 6.6, -5.7, 11.5; 8.8, -6.7, 5.5, -4.5; 6.3, -5.7, -23.4, 6.6; 14.3, 8.7, -15.7, -5.8]
# Решение с использованием мат.пакета
X := lsolve(A, B) = [0.466061; 0.110284; -0.565709; -1.18866]
