A := [
    -1.18, -0.34, -0.12, 0.15;
    0.11, -0.77, -0.15, 0.32;
    0.05, -0.12, -0.86, -0.18;
    0.12, 0.08, 0.06, -1
]
B := [1.33; -0.84; 1.16; -0.57]
# Решение с использованием мат.пакета
X := lsolve(A, B) = [-1.30659; 1.41357; -1.71072; 0.423652]
